*Heading
** Job name: SimpleTestModelStraightWeave Model name: Weave
** Generated by: Abaqus/CAE 2017
*Preprint, echo=NO, model=NO, history=NO, contact=NO
**
** PARTS
**
*Part, name=Beam
*Node
        1,       9.000,       6.000,       2.000
        2,       9.000,       6.000,       2.000
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*Element, type=B31
      1,       1,       2
      2,       3,       4
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*Elset, elset=LAYER_1_PRINTED, generate
     2,   1761,  1
*Elset, elset=LAYER_2_PRINTED, generate
  1762,   2157,  1
*Elset, elset=LAYER_3_PRINTED, generate
  2158,   2552,  1
*Elset, elset=LAYER_4_PRINTED, generate
  2553,   2948,  1
*Elset, elset=LAYER_5_PRINTED, generate
  2949,   3343,  1
*Elset, elset=LAYER_6_PRINTED, generate
  3344,   3739,  1
*Elset, elset=LAYER_7_PRINTED, generate
  3740,   4134,  1
*Elset, elset=LAYER_8_PRINTED, generate
  4135,   4530,  1
*Elset, elset=LAYER_9_PRINTED, generate
  4531,   4925,  1
*Elset, elset=LAYER_10_PRINTED, generate
  4926,   5321,  1
*Elset, elset=LAYER_11_PRINTED, generate
  5322,   5716,  1
*Elset, elset=LAYER_12_PRINTED, generate
  5717,   6112,  1
*Elset, elset=LAYER_13_PRINTED, generate
  6113,   6507,  1
*Elset, elset=LAYER_14_PRINTED, generate
  6508,   6903,  1
*Elset, elset=LAYER_15_PRINTED, generate
  6904,   7298,  1
*Elset, elset=LAYER_16_PRINTED, generate
  7299,   7694,  1
*Elset, elset=LAYER_17_PRINTED, generate
  7695,   8089,  1
*Elset, elset=LAYER_18_PRINTED, generate
  8090,   8485,  1
*Elset, elset=LAYER_19_PRINTED, generate
  8486,   8880,  1
*Elset, elset=LAYER_20_PRINTED, generate
  8881,   9276,  1
*Elset, elset=LAYER_21_PRINTED, generate
  9277,   9671,  1
*Elset, elset=LAYER_22_PRINTED, generate
  9672,  10067,  1
*Elset, elset=LAYER_23_PRINTED, generate
 10068,  10462,  1
*Elset, elset=LAYER_24_PRINTED, generate
 10463,  10858,  1
*Elset, elset=LAYER_25_PRINTED, generate
 10859,  11253,  1
*Elset, elset=LAYER_26_PRINTED, generate
 11254,  11649,  1
*Elset, elset=LAYER_27_PRINTED, generate
 11650,  12044,  1
*Elset, elset=LAYER_28_PRINTED, generate
 12045,  12440,  1
*Elset, elset=LAYER_29_PRINTED, generate
 12441,  12835,  1
*Elset, elset=LAYER_30_PRINTED, generate
 12836,  13231,  1
*Elset, elset=LAYER_31_PRINTED, generate
 13232,  13626,  1
*Elset, elset=LAYER_32_PRINTED, generate
 13627,  14022,  1
*Elset, elset=LAYER_33_PRINTED, generate
 14023,  14417,  1
*Elset, elset=LAYER_34_PRINTED, generate
 14418,  14813,  1
*Elset, elset=LAYER_35_PRINTED, generate
 14814,  15208,  1
*Elset, elset=LAYER_36_PRINTED, generate
 15209,  15604,  1
*Elset, elset=LAYER_37_PRINTED, generate
 15605,  15999,  1
*Elset, elset=LAYER_38_PRINTED, generate
 16000,  16396,  1
*Nset, nset=ALL, generate
 1,   29280,  1
*Nset, nset=SECTION, generate
 1,   29280,  1
*Elset, elset=SECTION, generate
 1,   16396,  1
** Section: Section-1-SECTION
*Solid Section, elset=LAYER_1_PRINTED, material=FIBERMATERIAL1
0.03,
** Section: Section-2-SECTION
*Solid Section, elset=LAYER_2_PRINTED, material=FIBERMATERIAL2
0.03,
** Section: Section-3-SECTION
*Solid Section, elset=LAYER_3_PRINTED, material=FIBERMATERIAL3
0.03,
** Section: Section-4-SECTION
*Solid Section, elset=LAYER_4_PRINTED, material=FIBERMATERIAL4
0.03,
** Section: Section-5-SECTION
*Solid Section, elset=LAYER_5_PRINTED, material=FIBERMATERIAL5
0.03,
** Section: Section-6-SECTION
*Solid Section, elset=LAYER_6_PRINTED, material=FIBERMATERIAL6
0.03,
** Section: Section-7-SECTION
*Solid Section, elset=LAYER_7_PRINTED, material=FIBERMATERIAL7
0.03,
** Section: Section-8-SECTION
*Solid Section, elset=LAYER_8_PRINTED, material=FIBERMATERIAL8
0.03,
** Section: Section-9-SECTION
*Solid Section, elset=LAYER_9_PRINTED, material=FIBERMATERIAL9
0.03,
** Section: Section-10-SECTION
*Solid Section, elset=LAYER_10_PRINTED, material=FIBERMATERIAL10
0.03,
** Section: Section-11-SECTION
*Solid Section, elset=LAYER_11_PRINTED, material=FIBERMATERIAL11
0.03,
** Section: Section-12-SECTION
*Solid Section, elset=LAYER_12_PRINTED, material=FIBERMATERIAL12
0.03,
** Section: Section-13-SECTION
*Solid Section, elset=LAYER_13_PRINTED, material=FIBERMATERIAL13
0.03,
** Section: Section-14-SECTION
*Solid Section, elset=LAYER_14_PRINTED, material=FIBERMATERIAL14
0.03,
** Section: Section-15-SECTION
*Solid Section, elset=LAYER_15_PRINTED, material=FIBERMATERIAL15
0.03,
** Section: Section-16-SECTION
*Solid Section, elset=LAYER_16_PRINTED, material=FIBERMATERIAL16
0.03,
** Section: Section-17-SECTION
*Solid Section, elset=LAYER_17_PRINTED, material=FIBERMATERIAL17
0.03,
** Section: Section-18-SECTION
*Solid Section, elset=LAYER_18_PRINTED, material=FIBERMATERIAL18
0.03,
** Section: Section-19-SECTION
*Solid Section, elset=LAYER_19_PRINTED, material=FIBERMATERIAL19
0.03,
** Section: Section-20-SECTION
*Solid Section, elset=LAYER_20_PRINTED, material=FIBERMATERIAL20
0.03,
** Section: Section-21-SECTION
*Solid Section, elset=LAYER_21_PRINTED, material=FIBERMATERIAL21
0.03,
** Section: Section-22-SECTION
*Solid Section, elset=LAYER_22_PRINTED, material=FIBERMATERIAL22
0.03,
** Section: Section-23-SECTION
*Solid Section, elset=LAYER_23_PRINTED, material=FIBERMATERIAL23
0.03,
** Section: Section-24-SECTION
*Solid Section, elset=LAYER_24_PRINTED, material=FIBERMATERIAL24
0.03,
** Section: Section-25-SECTION
*Solid Section, elset=LAYER_25_PRINTED, material=FIBERMATERIAL25
0.03,
** Section: Section-26-SECTION
*Solid Section, elset=LAYER_26_PRINTED, material=FIBERMATERIAL26
0.03,
** Section: Section-27-SECTION
*Solid Section, elset=LAYER_27_PRINTED, material=FIBERMATERIAL27
0.03,
** Section: Section-28-SECTION
*Solid Section, elset=LAYER_28_PRINTED, material=FIBERMATERIAL28
0.03,
** Section: Section-29-SECTION
*Solid Section, elset=LAYER_29_PRINTED, material=FIBERMATERIAL29
0.03,
** Section: Section-30-SECTION
*Solid Section, elset=LAYER_30_PRINTED, material=FIBERMATERIAL30
0.03,
** Section: Section-31-SECTION
*Solid Section, elset=LAYER_31_PRINTED, material=FIBERMATERIAL31
0.03,
** Section: Section-32-SECTION
*Solid Section, elset=LAYER_32_PRINTED, material=FIBERMATERIAL32
0.03,
** Section: Section-33-SECTION
*Solid Section, elset=LAYER_33_PRINTED, material=FIBERMATERIAL33
0.03,
** Section: Section-34-SECTION
*Solid Section, elset=LAYER_34_PRINTED, material=FIBERMATERIAL34
0.03,
** Section: Section-35-SECTION
*Solid Section, elset=LAYER_35_PRINTED, material=FIBERMATERIAL35
0.03,
** Section: Section-36-SECTION
*Solid Section, elset=LAYER_36_PRINTED, material=FIBERMATERIAL36
0.03,
** Section: Section-37-SECTION
*Solid Section, elset=LAYER_37_PRINTED, material=FIBERMATERIAL37
0.03,
** Section: Section-38-SECTION
*Solid Section, elset=LAYER_38_PRINTED, material=FIBERMATERIAL38
0.03,
*End Part
**
**
** ASSEMBLY
**
*Assembly, name=Assembly
**
*Instance, name=BEAM-1, part=BEAM
*End Instance
**
*End Assembly
**
** MATERIALS
**
*Material, name=DUMMY
